ABx := [2; 5]
ABy := [12; 9]
CDx := [2; 5]
CDy := [3; 6]
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# 12 - 2*a = 9 - 5a
# 3 = -3a
# 12 = -1*2 + b
# 9 = -1*5+b
ABx := [2; 5; 7; 9]
ABy := [12; 9; 7; 5]
CDx := [2; 5; 7; 9]
CDy := [3; 6; 8; 10]
Px := 6.5
Py := 7.5
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AB0 := [cos(π), -sin(π), 0; sin(π), cos(π), 0; 0, 0, 1]*[ABx[0]; ABy[0]; 1]
AB1 := [cos(π), -sin(π), 0; sin(π), cos(π), 0; 0, 0, 1]*[ABx[1]; ABy[1]; 1]
CD0 := [cos(π), -sin(π), 0; sin(π), cos(π), 0; 0, 0, 1]*[CDx[0]; CDy[0]; 1]
CD1 := [cos(π), -sin(π), 0; sin(π), cos(π), 0; 0, 0, 1]*[CDx[1]; CDy[1]; 1]
AB2 := [cos(π), -sin(π), 0; sin(π), cos(π), 0; 0, 0, 1]*[ABx[2]; ABy[2]; 1]
AB3 := [cos(π), -sin(π), 0; sin(π), cos(π), 0; 0, 0, 1]*[ABx[3]; ABy[3]; 1]
CD2 := [cos(π), -sin(π), 0; sin(π), cos(π), 0; 0, 0, 1]*[CDx[2]; CDy[2]; 1]
CD3 := [cos(π), -sin(π), 0; sin(π), cos(π), 0; 0, 0, 1]*[CDx[3]; CDy[3]; 1]
AB0 = [-2; -12; 1]
CD0 = [-2; -3; 1]
AB1 = [-5; -9; 1]
AB2 = [-7; -7; 1]
AB3 = [-9; -5; 1]
CD1 = [-5; -6; 1]
CD2 = [-7; -8; 1]
CD3 = [-9; -10; 1]
ABNx := 2*Px + [AB0[0]; AB1[0]; AB2[0]; AB3[0]]
ABNy := 2*Py + [AB0[1]; AB1[1]; AB2[1]; AB3[1]]
CDNx := 2*Px + [CD0[0]; CD1[0]; CD2[0]; CD3[0]]
CDNy := 2*Py + [CD0[1]; CD1[1]; CD2[1]; CD3[1]]
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ABNx = [11; 8; 6; 4]
ABNy = [3; 6; 8; 10]
CDNx = [11; 8; 6; 4]
CDNy = [12; 9; 7; 5]
Px = 6.5
Py = 7.5
